units metal
atom_style atomic
boundary p  p  p

log ordered.log

read_data ordered.struct

velocity all create ?temp? ?ordered_seed?

include run.in

clear

units metal
atom_style atomic
boundary p  p  p

log random.log

read_data random.struct

velocity all create ?temp? ?random_seed?

include run.in
